resume,tonometer_offset,db
/post1
set,last
fsum
*get,fy,fsum,0,item,fy
/com,=== TOTAL Y REACTION = %fy% N ===
esel,s,real,,9
esel,r,ename,,174
*get,nc9,elem,0,count
esel,s,real,,10
esel,r,ename,,170
*get,nc10,elem,0,count
/com,=== Contact(9)=%nc9%, Target(10)=%nc10% ===
esel,s,mat,,3
nsle,s
nsort,u,y
*get,eymin,sort,0,min
*get,eymax,sort,0,max
/com,=== Eyelid UY = [%eymin%, %eymax%] m ===
esel,s,mat,,4
nsle,s
nsort,u,y
*get,prmin,sort,0,min
*get,prmax,sort,0,max
/com,=== Probe UY = [%prmin%, %prmax%] m ===
allsel
fini
