! Generate stress contour PNG from the eye model result
resume,eye,db
/post1
set,last
/show,png
/gfile,800
! Von Mises stress contour
/title,Parametric Tonometer - Von Mises Stress (Pa)
plnsol,s,eqv
/title,Parametric Tonometer - Y Displacement (m)
plnsol,u,y
/title,Parametric Tonometer - Deformed shape
pldisp,2
/show,close
finish
